// COMSOL Multiphysics 6.4.0.429 model "Periodic-500GHz.mph"
// Outline of the model tree

Parameters
  f0 = 300[GHz]  // Operating frequency
  theta_i = 30[deg]  // Incidence angle from the surface normal
  W = 0.5[mm]  // Periodic-cell width
  d1 = 1.25[mm]
  d2 = 1.25[mm]
  d3 = 1.25[mm]
  d4 = 1.25[mm]
  hair = 1[mm]
  eps1 = 3.55
  eps2 = 4
  eps3 = 5
  eps4 = 6
  tand1 = 0.0027
  tand2 = 0.003
  tand3 = 0.004
  tand4 = 0.005
  k0 = 2*pi*freq/c_const
  kx = k0*sin(theta_i)

Geometry
  geom1 "Geometry 1" (2D, length unit mm)
    all_domain: Rectangle | size = {0.5, 7}; pos = {-0.25, -6}
    if0: LineSegment | specify1 = coord; coord1 = {-0.25, 0}; specify2 = coord; coord2 = {0.25, 0}
    if1: LineSegment | specify1 = coord; coord1 = {-0.25, -1.25}; specify2 = coord; coord2 = {0.25, -1.25}
    if2: LineSegment | specify1 = coord; coord1 = {-0.25, -2.5}; specify2 = coord; coord2 = {0.25, -2.5}
    if3: LineSegment | specify1 = coord; coord1 = {-0.25, -3.75}; specify2 = coord; coord2 = {0.25, -3.75}
    if4: LineSegment | specify1 = coord; coord1 = {-0.25, -5}; specify2 = coord; coord2 = {0.25, -5}
    partition_layers: PartitionDomains
      domain = all_domain(1) domains 1
      partitionwith = objects
      object = if0, if1, if2, if3, if4
    fin: Finalize "Form Union"

Physics
  emw: ElectromagneticWaves "Electromagnetic Waves, Frequency Domain" on all domains
    dependent variable E = {Ex, Ey, Ez}
    wee1: WaveEquationElectric (default)
      DisplacementFieldModel = RelativePermittivity
      epsilonr = 1
      epsilonInf = 1
      ConstitutiveRelationH = RelativePermeability
      mur = 1
      deltaEpsilon = 1
      multiphysics = The Semiconductor Electromagnetic Waves multiphysics coupling adds additional contributions to the optical properties
      omega1 = 10^5
      omega2 = 10^12
    pec1: PerfectElectricConductor (default)
      constraintType = symmetricConstraint
      constraintMethod = elemental
      constraintOptions = pointwiseConstraints
    init1: init "Initial Values 1" (default)
    wee_l1: WaveEquationElectric "Wave Equation, Electric 1a" on domains 5
      DisplacementFieldModel = LossTangentDF
      epsilonPrimDF = eps1
      tanDelta = tand1
      epsilonInf = 1
      ConstitutiveRelationH = RelativePermeability
      mur = 1
      deltaEpsilon = 1
      multiphysics = The Semiconductor Electromagnetic Waves multiphysics coupling adds additional contributions to the optical properties
      omega1 = 10^5
      omega2 = 10^12
    wee_l2: WaveEquationElectric on domains 4
      DisplacementFieldModel = LossTangentDF
      epsilonPrimDF = eps2
      tanDelta = tand2
      epsilonInf = 1
      ConstitutiveRelationH = RelativePermeability
      mur = 1
      deltaEpsilon = 1
      multiphysics = The Semiconductor Electromagnetic Waves multiphysics coupling adds additional contributions to the optical properties
      omega1 = 10^5
      omega2 = 10^12
    wee_l3: WaveEquationElectric on domains 3
      DisplacementFieldModel = LossTangentDF
      epsilonPrimDF = eps3
      tanDelta = tand3
      epsilonInf = 1
      ConstitutiveRelationH = RelativePermeability
      mur = 1
      deltaEpsilon = 1
      multiphysics = The Semiconductor Electromagnetic Waves multiphysics coupling adds additional contributions to the optical properties
      omega1 = 10^5
      omega2 = 10^12
    wee_l4: WaveEquationElectric on domains 2
      DisplacementFieldModel = LossTangentDF
      epsilonPrimDF = eps4
      tanDelta = tand4
      epsilonInf = 1
      ConstitutiveRelationH = RelativePermeability
      mur = 1
      deltaEpsilon = 1
      multiphysics = The Semiconductor Electromagnetic Waves multiphysics coupling adds additional contributions to the optical properties
      omega1 = 10^5
      omega2 = 10^12
    pc1: PeriodicCondition on boundaries 1, 3, 5, 7, 9, 11, 14-19
      PeriodicType = Floquet
      Floquet_source = UserDefined
      kFloquet = {kx, 0, 0}
      constraintType = symmetricConstraint
      constraintMethod = nodal
      TransformationMethod = automatic
      meshSimilarity = def
      constraintOptions = pointwiseConstraints
      RotationType = automatic
      meshSimilarityTol = 1e-3
      destinationDomains: boundaries 14-19
    port1: Port on boundaries 13
      PortName = 1
      PortExcitation = on
      Pin = 1[W/m]
      Pdep = 1[W/m]
      SlitType = PECBacked
      PortOrientation = ForwardPort
      Zref = 50[ohm]
      PortType = Periodic
      PortModeNumber = 1
      InputType = H
      Hampl = {0, 0, 1}
      PortFreq = 1[GHz]
      PortModeType = TM
      alpha_inc = theta_i
      epsilonr = 1
      PortCoaxialModeType = TEM
      IncludeInAutomaticDiffractionOrderCalculation = 1
      MaximumFrequency = FromStudy
      constraintType = symmetricConstraint
      constraintMethod = nodal
      n_mat = UserDefined
      Polarization = UserDefined
      LinearPol = TM
      CircularPol = lhcp
      DiffractionOrderSpecification = FromCurrentParameters
    port2: Port on boundaries 2
      PortName = 2
      Pin = 1[W/m]
      Pdep = 1[W/m]
      SlitType = PECBacked
      PortOrientation = ForwardPort
      Zref = 50[ohm]
      PortType = Periodic
      PortModeNumber = 1
      InputType = H
      Hampl = {0, 0, 1}
      PortFreq = 1[GHz]
      PortModeType = TM
      epsilonr = 1
      PortCoaxialModeType = TEM
      IncludeInAutomaticDiffractionOrderCalculation = 1
      MaximumFrequency = FromStudy
      constraintType = symmetricConstraint
      constraintMethod = nodal
      n_mat = UserDefined
      Polarization = UserDefined
      LinearPol = TM
      CircularPol = rhcp
      DiffractionOrderSpecification = FromCurrentParameters

Mesh
  mesh1 "Mesh 1"

Studies
  std1 "Study 1"
    freq: Frequency "Frequency Domain" | punit = GHz; plist = 500[GHz]

Solver configurations
  sol1 "Solution 1" (study std1)
    v1: Variables "Dependent Variables 1"
    s1: Stationary "Stationary Solver 1" | stol = 0.01; linpmethod = sol
      p1: Parametric | pname = freq; plistarr = 500[GHz]; punit = GHz; pcontinuationmode = no
      fc1: FullyCoupled | linsolver = d1
      d1: Direct "Suggested Direct Solver (emw)"

Datasets
  dset1: Solution | solution = sol1

Derived values
  gev1: EvalGlobal "Global Evaluation 1" | data = dset1; table = tbl1; expr = 20*log10(abs(emw.S11))
  gev_final_s11: EvalGlobal "Evaluate S11"
    data = dset1
    table = tbl_final_s11
    expr = {emw.S11*exp(i*2*(2*pi*freq/c_const)*cos(theta_i)*hair), abs(emw.S11*exp(i*2*(2*pi*freq/c_const)*cos(theta_i)*hair)), 20*log10(abs(emw.S11*exp(i*2*(2*pi*freq/c_const)*cos(theta_i)*hair))), arg(emw.S11*exp(i*2*(2*pi*freq/c_const)*cos(theta_i)*hair))}

Plots
  pg1: PlotGroup2D "Electric Field (emw)" | data = dset1
    surf1: Surface | expr = emw.normE
  pg2: PlotGroup1D "S-parameter (emw)" | data = dset1; ylabel = S-parameter (dB)
    glob1: Global | expr = {emw.S11dB, emw.S21dB}; unit = {1, 1}; descr = {S11, S21}; xdata = expr; xdataexpr = freq
  pg3: SmithGroup "Smith Plot (emw)" | data = dset1
    rgr1: ReflectionGraph
      expr = emw.S11
      unit = 1
      descr = S11
      title = Reflection Graph: S-parameter, Color: Frequency (GHz)
      col1: Color "Color Expression 1" | expr = emw.freq/1e9