// COMSOL Multiphysics 6.4.0.429 model "PML-500GHz.mph"
// Outline of the model tree

Parameters
  f0 = 500[GHz]
  theta_i = 30[deg]
  E0 = 1[V/m]
  k0 = 2*pi*f0/c_const
  kx = k0*sin(theta_i)
  ky = -k0*cos(theta_i)
  eps1 = 3.55
  eps2 = 4
  eps3 = 5
  eps4 = 6
  tand1 = 0.0027
  tand2 = 0.003
  tand3 = 0.004
  tand4 = 0.005
  x_s11 = 20[mm]  // Half-width of the coherent S11 projection aperture
  y_s11 = 0.5[mm]  // Height of the coherent S11 projection line

Variables
  var_s11 "Coherent Specular S11"
    w_s11 = if(abs(x)<=x_s11,0.5*(1+cos(pi*x/x_s11)),0)  // Hann aperture window
    S11_complex = exp(i*k0*cos(theta_i)*y_s11)*intop1(w_s11*at2(x,y_s11,emw.relEx)*exp(i*kx*x))/(intop1(w_s11)*(-E0*cos(theta_i)))  // Complex coherent specular reflection coefficient at y=0
    S11_magnitude = abs(S11_complex)  // Coherent S11 linear magnitude
    S11_dB = 20*log10(abs(S11_complex))  // Coherent S11 magnitude in dB
    S11_phase = arg(S11_complex)  // Coherent S11 phase at y=0

Couplings
  intop1: Integration "Coherent S11 Aperture Integration" on boundaries 50

Geometry
  geom1 "Geometry 1" (2D, length unit mm)
    outer: Rectangle | size = {58, 13}; pos = {-29, -9}
    vx1: LineSegment | specify1 = coord; coord1 = {-27, -9}; specify2 = coord; coord2 = {-27, 4}
    vx2: LineSegment | specify1 = coord; coord1 = {-25, -9}; specify2 = coord; coord2 = {-25, 4}
    vx3: LineSegment | specify1 = coord; coord1 = {25, -9}; specify2 = coord; coord2 = {25, 4}
    vx4: LineSegment | specify1 = coord; coord1 = {27, -9}; specify2 = coord; coord2 = {27, 4}
    hy1: LineSegment "Line Segment 1a" | specify1 = coord; coord1 = {-29, -7}; specify2 = coord; coord2 = {29, -7}
    hy2: LineSegment "Line Segment 2a" | specify1 = coord; coord1 = {-29, -5}; specify2 = coord; coord2 = {29, -5}
    hy3: LineSegment "Line Segment 3a" | specify1 = coord; coord1 = {-29, -3.75}; specify2 = coord; coord2 = {29, -3.75}
    hy4: LineSegment "Line Segment 4a" | specify1 = coord; coord1 = {-29, -2.5}; specify2 = coord; coord2 = {29, -2.5}
    hy5: LineSegment | specify1 = coord; coord1 = {-29, -1.25}; specify2 = coord; coord2 = {29, -1.25}
    hy6: LineSegment | specify1 = coord; coord1 = {-29, 0}; specify2 = coord; coord2 = {29, 0}
    hy7: LineSegment | specify1 = coord; coord1 = {-29, 2}; specify2 = coord; coord2 = {29, 2}
    partition_grid: PartitionDomains
      domain = outer(1) domains 1
      partitionwith = objects
      object = vx1, vx2, vx3, vx4, hy1, hy2, hy3, hy4, hy5, hy6, hy7
    fin: Finalize "Form Union"

Physics
  emw: ElectromagneticWaves "Electromagnetic Waves, Frequency Domain" on all domains
    dependent variable E = {Ex, Ey, Ez}
    wee1: WaveEquationElectric (default)
      DisplacementFieldModel = RelativePermittivity
      epsilonr = 1
      epsilonInf = 1
      ConstitutiveRelationH = RelativePermeability
      mur = 1
      deltaEpsilon = 1
      multiphysics = The Semiconductor Electromagnetic Waves multiphysics coupling adds additional contributions to the optical properties
      omega1 = 10^5
      omega2 = 10^12
    pec1: PerfectElectricConductor (default)
      constraintType = symmetricConstraint
      constraintMethod = elemental
      constraintOptions = pointwiseConstraints
    init1: init "Initial Values 1" (default)
    wee_l1: WaveEquationElectric "Wave Equation, Electric 1a" on domains 22
      DisplacementFieldModel = LossTangentDF
      epsilonPrimDF = eps1
      tanDelta = tand1
      epsilonInf = 1
      ConstitutiveRelationH = RelativePermeability
      mur = 1
      deltaEpsilon = 1
      multiphysics = The Semiconductor Electromagnetic Waves multiphysics coupling adds additional contributions to the optical properties
      omega1 = 10^5
      omega2 = 10^12
    wee_l2: WaveEquationElectric on domains 21
      DisplacementFieldModel = LossTangentDF
      epsilonPrimDF = eps2
      tanDelta = tand2
      epsilonInf = 1
      ConstitutiveRelationH = RelativePermeability
      mur = 1
      deltaEpsilon = 1
      multiphysics = The Semiconductor Electromagnetic Waves multiphysics coupling adds additional contributions to the optical properties
      omega1 = 10^5
      omega2 = 10^12
    wee_l3: WaveEquationElectric on domains 20
      DisplacementFieldModel = LossTangentDF
      epsilonPrimDF = eps3
      tanDelta = tand3
      epsilonInf = 1
      ConstitutiveRelationH = RelativePermeability
      mur = 1
      deltaEpsilon = 1
      multiphysics = The Semiconductor Electromagnetic Waves multiphysics coupling adds additional contributions to the optical properties
      omega1 = 10^5
      omega2 = 10^12
    wee_l4: WaveEquationElectric on domains 19
      DisplacementFieldModel = LossTangentDF
      epsilonPrimDF = eps4
      tanDelta = tand4
      epsilonInf = 1
      ConstitutiveRelationH = RelativePermeability
      mur = 1
      deltaEpsilon = 1
      multiphysics = The Semiconductor Electromagnetic Waves multiphysics coupling adds additional contributions to the optical properties
      omega1 = 10^5
      omega2 = 10^12
    sctr1: Scattering "Scattering Boundary Condition 1" on boundaries 1-3, 5, 7, 9, 11, 13, 15, 17, 19, 34, 36, 51, 53, 68, 70, 85-93
      IncidentField = NoIncidentField
      WaveType = PlaneWave
      kdir = {-emw.nx, -emw.ny, 0}
      Order = FirstOrder
      w0 = ((10*2)*pi)/emw.k0
      inputQuantity = ElectricFieldAmplitude
      inputPower = 1[W/m]

Mesh
  mesh1 "Mesh 1"

Studies
  std1 "Study 1"
    freq: Frequency "Frequency Domain" | punit = GHz; plist = f0

Solver configurations
  sol1 "Solution 1" (study std1)
    v1: Variables "Dependent Variables 1"
    s1: Stationary "Stationary Solver 1" | stol = 0.01; linpmethod = sol
      p1: Parametric | pname = freq; plistarr = f0; punit = GHz; pcontinuationmode = no
      fc1: FullyCoupled | linsolver = d1
      d1: Direct "Suggested Direct Solver (emw)" | linsolver = pardiso

Datasets
  dset1: Solution | solution = sol1

Derived values
  gev_s11: EvalGlobal "Evaluate Coherent S11"
    data = dset1
    table = tbl_s11
    expr = {S11_complex, S11_magnitude, S11_dB, S11_phase}