// COMSOL Multiphysics 6.4.0.429 model "PML-300GHz-Angular-Scattering.mph"
// PML 300 GHz - Angular Scattering Output
// Finite smooth multilayer PML model with upper-half-space angular-spectrum postprocessing. The normalized angular field uses the same 40 mm Hann aperture as coherent S11, so its +30 deg value equals S11. A separate near-rectangular 50 mm aperture reconstructs scattered E at 1 m and the 2D scattering width. This is a 2D scattering width (m), not a 3D radar cross section (m^2). Angles are measured from the upward surface normal.
// Outline of the model tree

Parameters
  f0 = 300[GHz]
  theta_i = 30[deg]
  E0 = 1[V/m]
  k0 = 2*pi*f0/c_const
  kx = k0*sin(theta_i)
  ky = -k0*cos(theta_i)
  eps1 = 3.55
  eps2 = 4
  eps3 = 5
  eps4 = 6
  tand1 = 0.0027
  tand2 = 0.003
  tand3 = 0.004
  tand4 = 0.005
  x_s11 = 20[mm]  // Half-width of the coherent S11 projection aperture
  y_s11 = 0.5[mm]  // Height of the coherent S11 projection line
  theta_scan_scale = 4[deg/mm]  // Maps the auxiliary cut-line x coordinate (-20 to 20 mm) to observation angle (-80 to 80 deg)
  x_ang_flat = 24[mm]  // Half-width of flat portion of angular/RCS aperture
  x_ang_edge = 25[mm]  // Half-width of angular/RCS aperture including cosine edge taper
  r_obs = 1[m]  // Reference range for reconstructed 2D far scattered electric field

Variables
  var_s11 "Coherent Specular S11"
    w_s11 = if(abs(x)<=x_s11,0.5*(1+cos(pi*x/x_s11)),0)  // Hann aperture window
    S11_complex = exp(i*k0*cos(theta_i)*y_s11)*intop1(w_s11*at2(x,y_s11,emw.relEx)*exp(i*kx*x))/(intop1(w_s11)*(-E0*cos(theta_i)))  // Complex coherent specular reflection coefficient at y=0
    S11_magnitude = abs(S11_complex)  // Coherent S11 linear magnitude
    S11_dB = 20*log10(abs(S11_complex))  // Coherent S11 magnitude in dB
    S11_phase = arg(S11_complex)  // Coherent S11 phase at y=0
  var_ang "Angular Scattered Field and 2D RCS" on all domains
    theta_obs = theta_scan_scale*x  // Observation angle from the upward surface normal; positive toward +x
    w_ang = if(abs(x)<=x_ang_flat,1,if(abs(x)<x_ang_edge,0.5*(1+cos(pi*(abs(x)-x_ang_flat)/(x_ang_edge-x_ang_flat))),0))  // Near-rectangular 50 mm angular-spectrum aperture with a 1 mm cosine edge taper
    Sang_complex = exp(i*k0*cos(theta_obs)*y_s11)*intop1(w_s11*at2(x,y_s11,emw.relEx)*exp(i*k0*sin(theta_scan_scale*dest(x))*x))/(intop1(w_s11)*(-E0*cos(theta_obs)))  // Complex normalized angular TM field; at +30 deg it equals coherent S11
    Sang_magnitude = abs(Sang_complex)  // Normalized angular scattered-field magnitude
    Sang_dB = 20*log10(max(abs(Sang_complex),1e-15))  // Normalized angular scattered-field magnitude in dB
    Sang_phase = arg(Sang_complex)  // Normalized angular scattered-field phase
    Sang_power = abs(Sang_complex)^2  // Normalized angular scattered-field intensity
    AEx_ang = exp(i*k0*cos(theta_obs)*y_s11)*intop1(w_ang*at2(x,y_s11,emw.relEx)*exp(i*k0*sin(theta_scan_scale*dest(x))*x))  // Windowed spatial Fourier transform of scattered Ex at y=0 reference plane
    Escat_far_complex = -AEx_ang*sqrt(k0/(2*pi*r_obs))*exp(-i*k0*r_obs+i*pi/4)  // Complex asymptotic total TM scattered electric field at r_obs in the upper half-space
    Escat_far_magnitude = abs(Escat_far_complex)  // Magnitude of asymptotic total TM scattered electric field at r_obs
    Escat_far_phase = arg(Escat_far_complex)  // Phase of asymptotic total TM scattered electric field at r_obs
    sigma2D = k0*abs(AEx_ang/E0)^2  // Upper-half-space 2D scattering width (RCS per unit out-of-plane length)
    sigma2D_dB = 10*log10(max(sigma2D/1[m],1e-30))  // 2D scattering width in dB relative to 1 m

Couplings
  intop1: Integration "Coherent S11 Aperture Integration" on boundaries 50

Geometry
  geom1 "Geometry 1" (2D, length unit mm)
    outer: Rectangle | size = {58, 13}; pos = {-29, -9}
    vx1: LineSegment | specify1 = coord; coord1 = {-27, -9}; specify2 = coord; coord2 = {-27, 4}
    vx2: LineSegment | specify1 = coord; coord1 = {-25, -9}; specify2 = coord; coord2 = {-25, 4}
    vx3: LineSegment | specify1 = coord; coord1 = {25, -9}; specify2 = coord; coord2 = {25, 4}
    vx4: LineSegment | specify1 = coord; coord1 = {27, -9}; specify2 = coord; coord2 = {27, 4}
    hy1: LineSegment "Line Segment 1a" | specify1 = coord; coord1 = {-29, -7}; specify2 = coord; coord2 = {29, -7}
    hy2: LineSegment "Line Segment 2a" | specify1 = coord; coord1 = {-29, -5}; specify2 = coord; coord2 = {29, -5}
    hy3: LineSegment "Line Segment 3a" | specify1 = coord; coord1 = {-29, -3.75}; specify2 = coord; coord2 = {29, -3.75}
    hy4: LineSegment "Line Segment 4a" | specify1 = coord; coord1 = {-29, -2.5}; specify2 = coord; coord2 = {29, -2.5}
    hy5: LineSegment | specify1 = coord; coord1 = {-29, -1.25}; specify2 = coord; coord2 = {29, -1.25}
    hy6: LineSegment | specify1 = coord; coord1 = {-29, 0}; specify2 = coord; coord2 = {29, 0}
    hy7: LineSegment | specify1 = coord; coord1 = {-29, 2}; specify2 = coord; coord2 = {29, 2}
    partition_grid: PartitionDomains
      domain = outer(1) domains 1
      partitionwith = objects
      object = vx1, vx2, vx3, vx4, hy1, hy2, hy3, hy4, hy5, hy6, hy7
    fin: Finalize "Form Union"

Physics
  emw: ElectromagneticWaves "Electromagnetic Waves, Frequency Domain" on all domains
    dependent variable E = {Ex, Ey, Ez}
    wee1: WaveEquationElectric (default)
      DisplacementFieldModel = RelativePermittivity
      epsilonr = 1
      epsilonInf = 1
      ConstitutiveRelationH = RelativePermeability
      mur = 1
      deltaEpsilon = 1
      multiphysics = The Semiconductor Electromagnetic Waves multiphysics coupling adds additional contributions to the optical properties
      omega1 = 10^5
      omega2 = 10^12
    pec1: PerfectElectricConductor (default)
      constraintType = symmetricConstraint
      constraintMethod = elemental
      constraintOptions = pointwiseConstraints
    init1: init "Initial Values 1" (default)
    wee_l1: WaveEquationElectric "Wave Equation, Electric 1a" on domains 22
      DisplacementFieldModel = LossTangentDF
      epsilonPrimDF = eps1
      tanDelta = tand1
      epsilonInf = 1
      ConstitutiveRelationH = RelativePermeability
      mur = 1
      deltaEpsilon = 1
      multiphysics = The Semiconductor Electromagnetic Waves multiphysics coupling adds additional contributions to the optical properties
      omega1 = 10^5
      omega2 = 10^12
    wee_l2: WaveEquationElectric on domains 21
      DisplacementFieldModel = LossTangentDF
      epsilonPrimDF = eps2
      tanDelta = tand2
      epsilonInf = 1
      ConstitutiveRelationH = RelativePermeability
      mur = 1
      deltaEpsilon = 1
      multiphysics = The Semiconductor Electromagnetic Waves multiphysics coupling adds additional contributions to the optical properties
      omega1 = 10^5
      omega2 = 10^12
    wee_l3: WaveEquationElectric on domains 20
      DisplacementFieldModel = LossTangentDF
      epsilonPrimDF = eps3
      tanDelta = tand3
      epsilonInf = 1
      ConstitutiveRelationH = RelativePermeability
      mur = 1
      deltaEpsilon = 1
      multiphysics = The Semiconductor Electromagnetic Waves multiphysics coupling adds additional contributions to the optical properties
      omega1 = 10^5
      omega2 = 10^12
    wee_l4: WaveEquationElectric on domains 19
      DisplacementFieldModel = LossTangentDF
      epsilonPrimDF = eps4
      tanDelta = tand4
      epsilonInf = 1
      ConstitutiveRelationH = RelativePermeability
      mur = 1
      deltaEpsilon = 1
      multiphysics = The Semiconductor Electromagnetic Waves multiphysics coupling adds additional contributions to the optical properties
      omega1 = 10^5
      omega2 = 10^12
    sctr1: Scattering "Scattering Boundary Condition 1" on boundaries 1-3, 5, 7, 9, 11, 13, 15, 17, 19, 34, 36, 51, 53, 68, 70, 85-93
      IncidentField = NoIncidentField
      WaveType = PlaneWave
      kdir = {-emw.nx, -emw.ny, 0}
      Order = FirstOrder
      w0 = ((10*2)*pi)/emw.k0
      inputQuantity = ElectricFieldAmplitude
      inputPower = 1[W/m]

Mesh
  mesh1 "Mesh 1"

Studies
  std1 "Study 1"
    freq: Frequency "Frequency Domain" | punit = GHz; plist = f0

Solver configurations
  sol1 "Solution 1" (study std1)
    v1: Variables "Dependent Variables 1"
    s1: Stationary "Stationary Solver 1"
      p1: Parametric
      fc1: FullyCoupled
      d1: Direct "Suggested Direct Solver (emw)"

Datasets
  dset1: Solution | solution = sol1
  cln_ang: CutLine2D "Observation Angle -80 to +80 deg" | data = dset1; genpoints = {{-20[mm], 1[mm]}, {20[mm], 1[mm]}}
  cpt_ang30: CutPoint2D "Angular Verification at +30 deg" | data = dset1; pointx = 7.5[mm]; pointy = 1[mm]

Derived values
  gev_s11: EvalGlobal "Evaluate Coherent S11"
    data = dset1
    table = tbl_s11
    expr = {S11_complex, S11_magnitude, S11_dB, S11_phase}
  pev_ang30: EvalPoint "Evaluate Angular Field at +30 deg"
    data = cpt_ang30
    table = tbl_ang30
    expr = {Sang_complex, S11_complex, abs(Sang_complex), Sang_dB, Sang_phase, abs(Sang_complex-S11_complex), Escat_far_complex, sigma2D, sigma2D_dB}

Plots
  pg_ang_db: PlotGroup1D "Angular Scattered Field Magnitude (dB)"
    data = cln_ang
    title = Normalized angular scattered field (30 deg = coherent S11)
    lngr1: LineGraph | expr = Sang_dB
  pg_rcs2d: PlotGroup1D "2D RCS versus Observation Angle"
    data = cln_ang
    title = 2D scattering width in upper half-space
    lngr1: LineGraph | expr = sigma2D_dB
  pg_ang_phase: PlotGroup1D "Angular Scattered Field Phase"
    data = cln_ang
    title = Phase of normalized angular scattered field at y=0
    lngr1: LineGraph | expr = Sang_phase

Exports
  data_ang: Data "Export Angular Scattering CSV"
    data = cln_ang
    expr = {theta_obs, real(Sang_complex), imag(Sang_complex), Sang_magnitude, Sang_dB, Sang_phase, Sang_power, real(Escat_far_complex), imag(Escat_far_complex), Escat_far_magnitude, Escat_far_phase, sigma2D, sigma2D_dB}
    filename = C:\Users\Mo\Documents\Codex\2026-08-16\i-want-to-design-and-simulate\PML-300GHz-Angular-Scattering-verified.csv